*Heading
** Job name: circle_coarse Model name: circle_coarse
** Generated by: Abaqus/CAE 2016
*Preprint, echo=NO, model=NO, history=NO, contact=NO
**
** PARTS
**
*Part, name=circle_coarse
*End Part
**
**
** ASSEMBLY
**
*Assembly, name=Assembly
**
*Instance, name=circle_coarse-1, part=circle_coarse
*Node
      1,           0.,        -1.25
      2,           0.,         -2.5
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*Element, type=DC2D3
  1, 113,   1,  13
  2, 148, 137, 114
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*Nset, nset=Set-1, generate
   1,  346,    1
*Elset, elset=Set-1, generate
   1,  600,    1
** Section: Section-1
*Solid Section, elset=Set-1, material=fluid
,
*End Instance
**
*Nset, nset=Set-1, instance=circle_coarse-1
 3,
*Elset, elset=_Surf-1_S2, internal, instance=circle_coarse-1
 157, 165, 169, 196, 208, 233, 469, 511, 512, 513, 533
*Elset, elset=_Surf-1_S1, internal, instance=circle_coarse-1
 474,
*Surface, type=ELEMENT, name=Surf-1
_Surf-1_S2, S2
_Surf-1_S1, S1
*Elset, elset=_Surf-2_S2, internal, instance=circle_coarse-1
  20,  62,  63,  64,  84, 308, 316, 320, 347, 359, 378
*Elset, elset=_Surf-2_S1, internal, instance=circle_coarse-1
 25,
*Surface, type=ELEMENT, name=Surf-2
_Surf-2_S2, S2
_Surf-2_S1, S1
*End Assembly
**
** MATERIALS
**
*Material, name=fluid
*Conductivity
1.,
*Density
1.,
** ----------------------------------------------------------------
**
** STEP: Step-1
**
*Step, name=Step-1, nlgeom=NO
*Heat Transfer, steady state, deltmx=0.
1., 1., 1e-05, 1.,
**
** BOUNDARY CONDITIONS
**
** Name: BC-1 Type: Temperature
*Boundary
Set-1, 11, 11
**
** LOADS
**
** Name: Load-1   Type: Surface heat flux
*Dsflux
Surf-1, S, 1.
** Name: Load-2   Type: Surface heat flux
*Dsflux
Surf-2, S, -1.
**
** OUTPUT REQUESTS
**
*Restart, write, frequency=0
**
** FIELD OUTPUT: F-Output-1
**
*Output, field, variable=PRESELECT
**
** HISTORY OUTPUT: H-Output-1
**
*Output, history
*Contact Output
HFLA, HTL, HTLA, SJD, SJDA, SJDT, SJDTA, WEIGHT
*Radiation Output
FTEMP, RADFL, RADFLA, RADTL, RADTLA, VFTOT
*End Step
